New "RegControl.creg1a" transformer=reg1a winding=2 tapwinding=2 vreg=120 band=2 ptratio=20 CTprim=700 R=3 X=7.5
New "RegControl.creg2a" transformer=reg2a winding=2 tapwinding=2 vreg=120 band=2 ptratio=20 CTprim=50 R=0.4 X=0.4
New "RegControl.creg3a" transformer=reg3a winding=2 tapwinding=2 vreg=120 band=1 ptratio=20 CTprim=50 R=0.4 X=0.4
New "RegControl.creg3c" transformer=reg3c winding=2 vreg=120 band=1 ptratio=20 CTprim=50 R=0.4 X=0.4 delay=15 reversible=no revvreg=120 revband=3 revR=0 revX=0 tapdelay=2 debugtrace=no maxtapchange=16 inversetime=no tapwinding=2 vlimit=0.0 PTphase=1 revThreshold=100 revDelay=60 revNeutral=No EventLog=YES RemotePTRatio=60 TapNum=3 Reset=NO LDC_Z=0 rev_Z=0 Cogen=No basefreq=60 enabled=true
New "RegControl.creg4a" transformer=reg4a winding=2 tapwinding=2 vreg=124 band=2 ptratio=20 CTprim=300 R=0.6 X=1.3
New "RegControl.creg4b" transformer=reg4b winding=2 vreg=124 band=2 ptratio=20 CTprim=300 delay=15 reversible=no revvreg=120 revband=3 revR=0 revX=0 tapdelay=2 debugtrace=no maxtapchange=16 inversetime=no tapwinding=2 vlimit=0.0 PTphase=1 revThreshold=100 revDelay=60 revNeutral=No EventLog=YES RemotePTRatio=60 TapNum=3 Reset=NO LDC_Z=0 rev_Z=0 Cogen=No basefreq=60 enabled=true R=1.4 X=2.6
New "RegControl.creg4c" transformer=reg4c winding=2 vreg=124 band=2 ptratio=20 CTprim=300 delay=15 reversible=no revvreg=120 revband=3 revR=0 revX=0 tapdelay=2 debugtrace=no maxtapchange=16 inversetime=no tapwinding=2 vlimit=0.0 PTphase=1 revThreshold=100 revDelay=60 revNeutral=No EventLog=YES RemotePTRatio=60 TapNum=7 Reset=NO LDC_Z=0 rev_Z=0 Cogen=No basefreq=60 enabled=true R=0.2 X=1.4
