New "XfmrCode.ct25" phases=1 windings=3 kVs=[2.4, 0.12, 0.12, ] kVAs=[25, 25, 25, ] %imag=0.5 %Rs=[0.6, 1.2, 1.2, ] %noloadloss=0.2 Xhl=2.04 Xht=2.04 Xlt=1.36
New "XfmrCode.ct50" phases=1 windings=3 kVs=[2.4, 0.12, 0.12, ] kVAs=[50, 50, 50, ] %imag=0.5 %Rs=[0.6, 1.2, 1.2, ] %noloadloss=0.2 Xhl=2.04 Xht=2.04 Xlt=1.36
New "XfmrCode.ct100" phases=1 windings=3 kVs=[2.4, 0.12, 0.12, ] kVAs=[100, 100, 100, ] %imag=0.5 %Rs=[0.6, 1.2, 1.2, ] %noloadloss=0.2 Xhl=2.04 Xht=2.04 Xlt=1.36
