New "Recloser.fdr" MonitoredObj=line.60 MonitoredTerm=1 SwitchedTerm=1 NumFast=2 PhaseFast=104 PhaseDelayed=117 PhaseTrip=600 TDPhFast=1 TDPhDelayed=1 GroundFast=106 GroundDelayed=135 GroundTrip=300 TDGrFast=1 TDGrDelayed=1 Shots=4 RecloseIntervals=(2, 2, 5, )
New "Recloser.a" NumFast=2 PhaseFast=104 PhaseDelayed=117 GroundFast=106 GroundDelayed=135 PhaseInst=0 GroundInst=0 Reset=15 Shots=4 RecloseIntervals=(2, 2, 5, ) Delay=0.0 Action=closed TDPhFast=1 TDGrFast=1 TDPhDelayed=1 TDGrDelayed=1 Normal=closed State=closed basefreq=60 enabled=true MonitoredObj=line.54 MonitoredTerm=2 SwitchedTerm=2 PhaseTrip=400 GroundTrip=200
New "Recloser.b" NumFast=2 PhaseFast=104 PhaseDelayed=117 GroundFast=106 GroundDelayed=135 PhaseInst=0 GroundInst=0 Reset=15 Shots=4 RecloseIntervals=(2, 2, 5, ) Delay=0.0 Action=closed TDPhFast=1 TDGrFast=1 TDPhDelayed=1 TDGrDelayed=1 Normal=closed State=closed basefreq=60 enabled=true MonitoredObj=line.46 MonitoredTerm=2 SwitchedTerm=2 PhaseTrip=200 GroundTrip=150
New "Recloser.c" NumFast=2 PhaseFast=104 PhaseDelayed=117 GroundFast=106 GroundDelayed=135 PhaseInst=0 GroundInst=0 Reset=15 Shots=4 RecloseIntervals=(2, 2, 5, ) Delay=0.0 Action=closed TDPhFast=1 TDGrFast=1 TDPhDelayed=1 TDGrDelayed=1 Normal=closed State=closed basefreq=60 enabled=true MonitoredObj=line.19 MonitoredTerm=2 SwitchedTerm=2 PhaseTrip=200 GroundTrip=150
New "Recloser.d" NumFast=2 PhaseFast=104 PhaseDelayed=117 GroundFast=106 GroundDelayed=135 PhaseInst=0 GroundInst=0 Reset=15 Shots=4 RecloseIntervals=(2, 2, 5, ) Delay=0.0 Action=closed TDPhFast=1 TDGrFast=1 TDPhDelayed=1 TDGrDelayed=1 Normal=closed State=closed basefreq=60 enabled=true MonitoredObj=line.22 MonitoredTerm=2 SwitchedTerm=2 PhaseTrip=150 GroundTrip=100
