New "Relay.pv_pv1" MonitoredObj=vccs.Pv1 SwitchedObj=vccs.Pv1 MonitoredTerm=1 SwitchedTerm=1 type=voltage RecloseIntervals=NONE Shots=1 Delay=0.0 kvbase=0.416 Overvoltcurve=ov1547_2 Undervoltcurve=uv1547_2
New "Relay.pv_pv2" MonitoredTerm=1 SwitchedTerm=1 type=voltage PhaseTrip=1.0 GroundTrip=1.0 PhaseInst=0.0 GroundInst=0.0 Reset=15 Shots=1 RecloseIntervals=NONE Overvoltcurve=ov1547_2 Undervoltcurve=uv1547_2 kvbase=0.416 Breakertime=0.0 action=closed 46%Pickup=20 46isqt=1 46BaseAmps=100 Delay=0.0 47%Pickup=2 overtrip=1.2 undertrip=0.8 TDPhase=1.0 TDGround=1.0 Z1mag=0.7 Z1ang=64.0 Z0mag=2.1 Z0ang=68.0 Mphase=0.7 Mground=0.7 EventLog=Yes DebugTrace=No Normal=closed State=closed DOC_TiltAngleLow=90.0 DOC_TiltAngleHigh=90.0 DOC_TripSettingLow=0.0 DOC_TripSettingHigh=-1.0 DOC_TripSettingMag=-1.0 DOC_DelayInner=-1.0 DOC_PhaseTripInner=1.0 DOC_TDPhaseInner=1.0 basefreq=60 enabled=true MonitoredObj=vccs.Pv2 SwitchedObj=vccs.Pv2
New "Relay.pv_pv3" MonitoredTerm=1 SwitchedTerm=1 type=voltage PhaseTrip=1.0 GroundTrip=1.0 PhaseInst=0.0 GroundInst=0.0 Reset=15 Shots=1 RecloseIntervals=NONE Overvoltcurve=ov1547_2 Undervoltcurve=uv1547_2 kvbase=0.416 Breakertime=0.0 action=closed 46%Pickup=20 46isqt=1 46BaseAmps=100 Delay=0.0 47%Pickup=2 overtrip=1.2 undertrip=0.8 TDPhase=1.0 TDGround=1.0 Z1mag=0.7 Z1ang=64.0 Z0mag=2.1 Z0ang=68.0 Mphase=0.7 Mground=0.7 EventLog=Yes DebugTrace=No Normal=closed State=closed DOC_TiltAngleLow=90.0 DOC_TiltAngleHigh=90.0 DOC_TripSettingLow=0.0 DOC_TripSettingHigh=-1.0 DOC_TripSettingMag=-1.0 DOC_DelayInner=-1.0 DOC_PhaseTripInner=1.0 DOC_TDPhaseInner=1.0 basefreq=60 enabled=true MonitoredObj=vccs.Pv3 SwitchedObj=vccs.Pv3
New "Relay.pv_pv4" MonitoredTerm=1 SwitchedTerm=1 type=voltage PhaseTrip=1.0 GroundTrip=1.0 PhaseInst=0.0 GroundInst=0.0 Reset=15 Shots=1 RecloseIntervals=NONE Overvoltcurve=ov1547_2 Undervoltcurve=uv1547_2 kvbase=0.416 Breakertime=0.0 action=closed 46%Pickup=20 46isqt=1 46BaseAmps=100 Delay=0.0 47%Pickup=2 overtrip=1.2 undertrip=0.8 TDPhase=1.0 TDGround=1.0 Z1mag=0.7 Z1ang=64.0 Z0mag=2.1 Z0ang=68.0 Mphase=0.7 Mground=0.7 EventLog=Yes DebugTrace=No Normal=closed State=closed DOC_TiltAngleLow=90.0 DOC_TiltAngleHigh=90.0 DOC_TripSettingLow=0.0 DOC_TripSettingHigh=-1.0 DOC_TripSettingMag=-1.0 DOC_DelayInner=-1.0 DOC_PhaseTripInner=1.0 DOC_TDPhaseInner=1.0 basefreq=60 enabled=true MonitoredObj=vccs.Pv4 SwitchedObj=vccs.Pv4
