redirect IEEE13_CDPSM.dss
solve
uuids file=IEEE13Nodeckt_Base_UUIDS.dat
export cim100 substation=subname geo=region subgeo=subregion file=ieee13cdpsm.xml
export cim100fragments substation=subname geo=region subgeo=subregion file=ieee13cdpsm
export uuids IEEE13Nodeckt_Base_UUIDS.dat

redirect IEEE13_Assets.dss
solve
uuids file=IEEE13NodecktAssets_Base_UUIDS.dat
export cim100 substation=subname geo=region subgeo=subregion file=ieee13assets.xml
export cim100fragments substation=subname geo=region subgeo=subregion file=ieee13assets
export uuids IEEE13NodecktAssets_Base_UUIDS.dat
