clear
Set DefaultBaseFrequency=60

! IEEE 4-bus test case   Y-Y Stepdown Balanced
! Based on script developed by Alan Dunn and Steve Sparling

new circuit.YYBal basekV=12.47 phases=3
! **** HAVE TO STIFFEN THE SOURCE UP A LITTLE; THE TEST CASE ASSUMES AN INFINITE BUS
~ mvasc3=200000 200000

set earthmodel=carson

! **** DEFINE WIRE DATA
new wiredata.conductor Runits=mi Rac=0.306 GMRunits=ft GMRac=0.0244  Radunits=in Diam=0.721
new wiredata.neutral   Runits=mi Rac=0.592 GMRunits=ft GMRac=0.00814 Radunits=in Diam=0.563

! **** DEFINE LINE GEOMETRY; REDUCE OUT THE NEUTRAL
new linegeometry.4wire nconds=4 nphases=3 reduce=yes
~ cond=1 wire=conductor units=ft x=-4   h=28
~ cond=2 wire=conductor units=ft x=-1.5 h=28
~ cond=3 wire=conductor units=ft x=3    h=28
~ cond=4 wire=neutral   units=ft x=0    h=24

! **** 12.47 KV LINE
new line.line1 geometry=4wire length=2000 units=ft bus1=sourcebus bus2=n2

! **** single-phase, center-tapped secondary transformers
New XfmrCode.CT2000  phases=1 windings=3 kvs=[7.2 0.12 0.12] kVAs=[2000.0 2000.0 2000.0]
~ %imag=0.5 %Rs=[0.6 1.2 1.2] %noloadloss=0.2 Xhl=2.04 Xht=2.04 Xlt=1.36
New Transformer.T1 XfmrCode=CT2000 buses=[n2.3 House.1.0 House.0.2]
New Load.House1    phases=1 Bus1=House.1.0 kv=0.12009 conn=wye model=5 kW=1000.0 pf=0.9 Vminpu=.75
New Load.House2    phases=1 Bus1=House.2.0 kv=0.12009 conn=wye model=5 kW= 800.0 pf=0.9 Vminpu=.75


set voltagebases=[12.47, 0.208]
calcvoltagebases     ! **** let DSS compute voltage bases
set tolerance=1e-8
solve
